<?xml version="1.0"?>
<fdm_config name="Adaptive_Tailsitter" version="2.0" release="BETA">
    <fileheader>
        <author>Grigorii Borodachev</author>
        <organization>
            Department of Aeronautical Engineering,
            Moscow Aviation Institut,
            Russia
        </organization>
        <version>0.1</version>
        <description>Model a 2026 G1-T UAV</description>
    </fileheader>

    <metrics>
        <wingarea unit="M2"> 0.3629 </wingarea>
        <wingspan unit="M"> 1.7038 </wingspan>
        <chord unit="M"> 0.2183 </chord>
        <vtailarea unit="M2"> 0.0388 </vtailarea>
        <vtailarm unit="M"> 0.2966 </vtailarm>
        <location name="AERORP" unit="M">
            <x> 0.0546 </x> <y> 0.0 </y> <z> 0.0 </z>
        </location>
        <location name="VRP" unit="M">
            <x> 0.0 </x> <y> 0.0 </y> <z> 0.0 </z>
        </location>
    </metrics>

    <mass_balance>
        <ixx unit="KGM2"> 1.7911 </ixx>
        <iyy unit="KGM2"> 0.0294 </iyy>
        <izz unit="KGM2"> 1.8205 </izz>
        <emptywt unit="KG"> 7.4036 </emptywt>
        <location name="CG" unit="M">
            <x> 0.0437 </x> <y> 0.0 </y> <z> 0.0 </z>
        </location>
    </mass_balance>

    <aerodynamics>
        <axis name="WIND">
            <function name="aero/coefficient/CL">
                <table>
                    <independentVar lookup="row">aero/alpha-deg</independentVar>
                    <tableData>
       2.3 0.3000
       3.2 0.5000
       4.4 0.7000
       6.2 0.9000
       8.5 1.1000
                    </tableData>
                </table>
            </function>
            <function name="aero/coefficient/CD">
                <table>
                    <independentVar lookup="row">aero/alpha-deg</independentVar>
                    <tableData>
       2.3 0.0094
       3.2 0.0092
       4.4 0.0098
       6.2 0.0106
       8.5 0.0155
                    </tableData>
                </table>
            </function>
            <function name="aero/coefficient/Cm">
                <table>
                    <independentVar lookup="row">aero/alpha-deg</independentVar>
                    <tableData>
       2.3 0.0147
       3.2 -0.0070
       4.4 -0.0200
       6.2 -0.0200
       8.5 -0.0112
                    </tableData>
                </table>
            </function>
        </axis>
    </aerodynamics>
</fdm_config>
